*HEADING
Strain Type Test Case - Deformation Plasticity

*PREPRINT, ECHO=NO, MODEL=NO, HISTORY=NO, CONTACT=NO

*NODE, NSET=NALL
1, 0., 0., 0.
2, 1., 0., 0.
3, 1., 1., 0.
4, 0., 1., 0.
5, 0., 0., 1.
6, 1., 0., 1.
7, 1., 1., 1.
8, 0., 1., 1.
*ELEMENT, TYPE=C3D8, ELSET=EALL
1, 1, 2, 3, 4, 5, 6, 7, 8
*SOLID SECTION, ELSET=EALL, MATERIAL=Mat-1

*MATERIAL, NAME=Mat-1
*DEFORMATION PLASTICITY
70000.0, 0.3, 290., 14.0, 4.

*STEP, NLGEOM
*STATIC
1., 1., 1e-05, 1.
*BOUNDARY, OP=NEW
NALL, 1, 3, 0.
2, 1, 1, 0.2
*EL FILE, POSITION=INTEGRATION POINTS, FREQUENCY=1
S, E
*END STEP
