*HEADING
Broken keyword sample
*NODE
1, 0.0, 0.0, 0.0
2, 1.0, 0.0, 0.0
*ELEMENT, TYPE=C3D8, ELSET=EALL
1, 1, 2
*MATERIAL, NAME=STEEL
*ELSTIC
210000, 0.3
*BOUNDARY
1, 1, 3, 0.0
*STEP
*STATIC
1.0, 1.0
*END STEP
